# OpenSim document version 40000
AnalyzeTool analysis_walkID:
  model_file: ../Scale/SubjectID_adjusted.osim
  replace_force_set: true
  force_set_files: ../Analysis/force_set.xml
  results_directory: ../Analysis/results_analysis_walkID
  output_precision: 8
  initial_time: 4
  final_time: 5
  solve_for_equilibrium_for_auxiliary_states: false
  maximum_number_of_integrator_steps: 20000
  maximum_integrator_step_size: 1
  minimum_integrator_step_size: 1e-8
  integrator_error_tolerance: 1e-5
  external_loads_file: ../Analysis/grf_walkID.xml
  coordinates_file: ../IK/SubjectID_walkID_ik.mot
  AnalysisSet Analyses:
    BodyKinematics: start_time=4 end_time=5 step_interval=1 in_degrees=true bodies=center_of_mass
        express_results_in_body_local_frame=false
