# OpenSim document version 40000
InverseKinematicsTool walk:
  results_directory: results_walkID
  model_file: ../Scale/SubjectID_adjusted.osim
  constraint_weight: Inf
  accuracy: 1e-5
  marker_file: ../../../Data/SubjectID/SubjectID_walkID.trc
  time_range: 4 5
  report_errors: true
  output_motion_file: SubjectID_walkID_ik.mot
  report_marker_locations: true
  IKTaskSet:
    IKMarkerTask C7: apply=true weight=25
    IKMarkerTask RSHO: apply=true weight=10
    IKMarkerTask LSHO: apply=true weight=10
    IKMarkerTask RASI: apply=true weight=50
    IKMarkerTask LASI: apply=true weight=50
    IKMarkerTask SACR: apply=true weight=50
    IKMarkerTask RKNE: apply=true weight=50
    IKMarkerTask LKNE: apply=true weight=50
    IKMarkerTask RMKNE: apply=false weight=0
    IKMarkerTask LMKNE: apply=false weight=0
    IKMarkerTask RANK: apply=true weight=50
    IKMarkerTask LANK: apply=true weight=50
    IKMarkerTask RMED: apply=false weight=0
    IKMarkerTask LMED: apply=false weight=0
    IKMarkerTask RTOE: apply=true weight=25
    IKMarkerTask LTOE: apply=true weight=25
    IKMarkerTask RMET: apply=true weight=15
    IKMarkerTask LMET: apply=true weight=15
    IKMarkerTask RHEE: apply=true weight=50
    IKMarkerTask LHEE: apply=true weight=50
    IKMarkerTask RTHI: apply=true weight=25
    IKMarkerTask RTIB: apply=true weight=50
    IKMarkerTask LTHI: apply=true weight=25
    IKMarkerTask LTIB: apply=true weight=50
