# OpenSim document version 40000
ExternalLoads grf_walk:
  datafile: ../../../Data/SubjectID/SubjectID_walkID_grf_filtered.mot
  lowpass_cutoff_frequency_for_load_kinematics: 6
  ExternalForce GRF_FP1: applied_to_body=calcn_lr1 force_expressed_in_body=ground point_expressed_in_body=ground
      force_identifier=1_ground_force_v point_identifier=1_ground_force_p torque_identifier=1_ground_torque_
  ExternalForce GRF_FP2: applied_to_body=calcn_lr2 force_expressed_in_body=ground point_expressed_in_body=ground
      force_identifier=2_ground_force_v point_identifier=2_ground_force_p torque_identifier=2_ground_torque_
  ExternalForce GRF_FP3: applied_to_body=calcn_lr3 force_expressed_in_body=ground point_expressed_in_body=ground
      force_identifier=3_ground_force_v point_identifier=3_ground_force_p torque_identifier=3_ground_torque_
