# OpenSim document version 40000
ScaleTool SubjectID_scale:
  mass: -1 [kg]
  height: -1
  age: -1
  notes: Scale setup file.
  GenericModelMaker:
    model_file: ../../Rajagopal_passiveCal_hipAbd.osim
  ModelScaler:
    apply: true
    scaling_order: measurements manualScale
    marker_file: ../../../Data/SubjectID/SubjectID_static.trc
    time_range: 0.1 0.3
    preserve_mass_distribution: true
    output_model_file: SubjectID_scaled.osim
    output_scale_file: scaleSet_applied.xml
    MeasurementSet:
      Measurement torso: apply=true
        MarkerPair: markers=(RASI RSHO)
        MarkerPair: markers=(LASI LSHO)
        MarkerPair: markers=(SACR C7)
        BodyScale torso: axes=(X Y Z)
        BodyScale humerus_r: axes=(X Y Z)
        BodyScale ulna_r: axes=(X Y Z)
        BodyScale radius_r: axes=(X Y Z)
        BodyScale hand_r: axes=(X Y Z)
        BodyScale humerus_l: axes=(X Y Z)
        BodyScale ulna_l: axes=(X Y Z)
        BodyScale radius_l: axes=(X Y Z)
        BodyScale hand_l: axes=(X Y Z)
      Measurement torso no markers: apply=false
        MarkerPair: markers=(LASI RASI)
        BodyScale torso: axes=(X Y Z)
      Measurement pelvis_XZ: apply=true
        MarkerPair: markers=(LASI RASI)
        BodyScale pelvis: axes=(X Z)
      Measurement pelvis_Y: apply=true
        MarkerPair: markers=(LASI SACR)
        MarkerPair: markers=(RASI SACR)
        BodyScale pelvis: axes=Y
      Measurement Rthigh: apply=true
        MarkerPair: markers=(RASI RKNE)
        BodyScale femur_r: axes=(X Y Z)
        BodyScale patella_r: axes=(X Y Z)
      Measurement Lthigh: apply=true
        MarkerPair: markers=(LASI LKNE)
        BodyScale femur_l: axes=(X Y Z)
        BodyScale patella_l: axes=(X Y Z)
      Measurement Rshank: apply=true
        MarkerPair: markers=(RKNE RANK)
        BodyScale tibia_r: axes=(X Y Z)
        BodyScale talus_r: axes=(X Y Z)
      Measurement Lshank: apply=true
        MarkerPair: markers=(LKNE LANK)
        BodyScale tibia_l: axes=(X Y Z)
        BodyScale talus_l: axes=(X Y Z)
      Measurement Rfoot: apply=true
        MarkerPair: markers=(RKNE RANK)
        BodyScale calcn_r: axes=(X Y Z)
        BodyScale toes_r: axes=(X Y Z)
      Measurement Lfoot: apply=true
        MarkerPair: markers=(LKNE LANK)
        BodyScale calcn_l: axes=(X Y Z)
        BodyScale toes_l: axes=(X Y Z)
  MarkerPlacer:
    apply: true
    marker_file: ../../../Data/SubjectID/SubjectID_static.trc
    time_range: 0.1 0.3
    output_motion_file: scale_output.mot
    output_model_file: SubjectID_scaled.osim
    output_marker_file: SubjectID_scaled_markerset.xml
    max_marker_movement: -1
    IKTaskSet:
      IKMarkerTask Sternum: apply=false weight=1
      IKMarkerTask RSHO: weight=25
      IKMarkerTask LSHO: weight=25
      IKMarkerTask C7: weight=50
      IKMarkerTask CLAV: weight=10
      IKMarkerTask RASI: weight=100
      IKMarkerTask LASI: weight=100
      IKMarkerTask SACR: weight=100
      IKMarkerTask RTHI: weight=75
      IKMarkerTask RKNE: weight=100
      IKMarkerTask RMKNE: apply=true weight=100
      IKMarkerTask RTIB: weight=25
      IKMarkerTask RANK: weight=100
      IKMarkerTask RHEE: weight=100
      IKMarkerTask RTOE: weight=50
      IKMarkerTask LTHI: weight=75
      IKMarkerTask LKNE: weight=100
      IKMarkerTask LMKNE: apply=true weight=100
      IKMarkerTask LTIB: weight=25
      IKMarkerTask LANK: weight=100
      IKMarkerTask LHEE: weight=100
      IKMarkerTask LTOE: weight=50
      IKCoordinateTask [values shared by the 5 below unless stated]: apply=true weight=1000 value_type=default_value
          value=0
      IKCoordinateTask subtalar_angle_r
      IKCoordinateTask mtp_angle_r
      IKCoordinateTask subtalar_angle_l
      IKCoordinateTask mtp_angle_l
      IKCoordinateTask lumbar_extension: apply=false weight=100 value_type=manual_value value=0.1745
